# 1.Функция плотности распределения (f)
f(x, α, β) := β/(x^2*sqrt(2*π))*e^(-1/2*(β/x - α)^2)
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# 2. Функция распределения (F)
F(x, α, β) := integral(f(x, α, β), x = 0 .. x)
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# 3. Характеристики распределения
M1 := integral(x*f(x, 5, 10), x = 0 .. 5)
M2 := integral(x*f(x, 6, 10), x = 0 .. 5)
M3 := integral(x*f(x, 7, 10), x = 0 .. 5)
D1 := integral(x^2*f(x, 5, 10), x = 0 .. 5) - M1^2
D2 := integral(x^2*f(x, 6, 10), x = 0 .. 5) - M2^2
D3 := integral(x^2*f(x, 7, 10), x = 0 .. 5) - M3^2
σ1 := sqrt(D1)
σ2 := sqrt(D2)
σ3 := sqrt(D3)
# 4. Построение графика обратной функции
n := 10000
i := 0 .. n - 1
a := 0
b := 1
Y := runif(n, a, b)
Ys := sort(Y)
X1(i) := root(F(x, 5, 10) - Ys[i], x, 0, 10)
X2(i) := root(F(x, 6, 10) - Ys[i], x, 0, 10)
X3(i) := root(F(x, 7, 10) - Ys[i], x, 0, 10)
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# 5. Гистограмма плотности распределения
bin := 50
j := 0 .. bin - 1
lower1 := floor(X1(0))
lower2 := floor(X2(0))
lower3 := floor(X3(0))
upper1 := ceil(X1(n - 1))
upper2 := ceil(X2(n - 1))
upper3 := ceil(X3(n - 1))
h1 := (upper1 - lower1)/bin
h2 := (upper2 - lower2)/bin
h3 := (upper3 - lower3)/bin
int1[j] := lower1 + h1*j
int2[j] := lower2 + h2*j
int3[j] := lower3 + h3*j
x1[i] := X1(i)
x2[i] := X2(i)
x3[i] := X3(i)
t1 := hist(int1, x1)/(n*h1)
t2 := hist(int2, x2)/(n*h2)
t3 := hist(int3, x3)/(n*h3)
int1[j] := int1[j] + h1/2
int2[j] := int2[j] + h2/2
int3[j] := int3[j] + h3/2
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# 6. Сравнение значений характеристик
m1 := sum(x1[i], i = 0 .. n - 1)/n
m2 := sum(x2[i], i = 0 .. n - 1)/n
m3 := sum(x3[i], i = 0 .. n - 1)/n
d1 := sum(x1[i]^2, i = 0 .. n - 1)/n - (sum(x1[i], i = 0 .. n - 1)/n)^2
d2 := sum(x2[i]^2, i = 0 .. n - 1)/n - (sum(x2[i], i = 0 .. n - 1)/n)^2
d3 := sum(x3[i]^2, i = 0 .. n - 1)/n - (sum(x3[i], i = 0 .. n - 1)/n)^2
sigma1 := sqrt(d1)
sigma2 := sqrt(d2)
sigma3 := sqrt(d3)
M1 = 2.08428
M2 = 1.71732
M3 = 1.45972
D1 = 0.226316
D2 = 0.099763
D3 = 0.0499722
m1 = 2.10359
m2 = 1.72441
m3 = 1.46444
d1 = 0.256695
d2 = 0.105712
d3 = 0.0526005
sigma1 = 0.50665
sigma2 = 0.325134
sigma3 = 0.229348
