# 1. Данные для статистического анализа
f(t, α, β) := β/(t^2*sqrt(2*π))*e^(-1/2*(β/t - α)^2)
F(t, α, β) := integral(f(t, α, β), t = 0 .. t)
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n := 10000
i := 0 .. n - 1
a := 0
b := 1
Y := runif(n, a, b)
h := 0.1
X1n[i] := root(F(x, 5, 10) - Y[i], x, 0, 10)  # error: You interrupted calculation. To resume, click here and press 'F9'.
X2n[i] := root(F(x, 6, 10) - Y[i], x, 0, 10)
X3n[i] := root(F(x, 7, 10) - Y[i], x, 0, 10)
X1 := sort(X1n)
X2 := sort(X2n)
X3 := sort(X3n)
N3(t) :=
    i ← 0
    while t > X3[i]
        i ← i + 1
    n - i
N1(t) :=
    i ← 0
    while t > X1[i]
        i ← i + 1
    n - i
N2(t) :=
    i ← 0
    while t > X2[i]
        i ← i + 1
    n - i
T2max := round(max(X2)/h, 0)
T3max := round(max(X3)/h, 0)
T1max := round(max(X1)/h, 0)
i1 := 0 .. T1max
i2 := 0 .. T2max
i3 := 0 .. T3max
T1[i1] := i1*h
T2[i2] := i2*h
T3[i3] := i3*h
i1 := 0 .. T1max - 1
i2 := 0 .. T2max - 1
i3 := 0 .. T3max - 1
# 2. Функция надёжности
P1[i1] := N1(T1[i1])/n
P2[i2] := N2(T2[i2])/n
P3[i3] := N3(T3[i3])/n
P1[T1max] := 0
P2[T2max] := 0
P3[T3max] := 0
P(t, a, b) := 1 - F(t, a, b)
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# 3. Функция ненадёжности
Q1[i1] := (n - N1(T1[i1]))/n
Q2[i2] := (n - N2(T2[i2]))/n
Q3[i3] := (n - N3(T3[i3]))/n
Q(x, a, b) := F(x, a, b)
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# 4. Функция частоты
i1 := 0 .. T1max - 2
i2 := 0 .. T2max - 2
i3 := 0 .. T3max - 2
f1[i1] := (N1(T1[i1]) - N1(T1[i1] + h))/(n*h)
f2[i2] := (N2(T2[i2]) - N2(T2[i2] + h))/(n*h)
f3[i3] := (N3(T3[i3]) - N3(T3[i3] + h))/(n*h)
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# 5. Функция интенсивности
λ1[i1] := (N1(T1[i1]) - N1(T1[i1] + h))/(N1(T1[i1])*h)
λ2[i2] := (N2(T2[i2]) - N2(T2[i2] + h))/(N2(T2[i2])*h)
λ3[i3] := (N3(T3[i3]) - N3(T3[i3] + h))/(N3(T3[i3])*h)
λ(x, a, b) := f(x, a, b)/P(x, a, b)
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