# 1.  Генерация интервалов времени
ORIGIN := 1
n := 19
i := 1 .. n
t := sort(rexp(n + 1, 0.04))
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t = [2.76696; 5.32927; 5.50393; 5.6354; 7.39981; 8.63615; 13.9068; 15.0351; 16.0358; 22.7569; 25.0208; 26.8981; 29.1714; 31.4462; 38.1318; 44.4562; 48.3057; 49.7745; 67.8863; 105.527]
# 2. Возьмём частные производные по E0 и Kjm и найдём условия экстремума
Einit := 20
Kinit := 0.005
Given
sum(1/(Einit - i + 1) - Kinit*t[i], i = 1 .. n) == 0
sum(1/Kinit - (Einit - i + 1)*t[i], i = 1 .. n) == 0  # ∞
[Kjm; E0] := Find(Kinit, Einit) = [0.00595933; 19.7431]
# 3. Оценка коэффицента Джелинского-Моранды
Kjm = 0.00595933
# 4. Оценка числа ошибок в ПО до начала тестирования
E0 = 19.7431
# 5. Интенсивность отказов до следующей n+1 ошибки
λ[i] := Kjm*(round(E0) - i + 1)
λ[n + 1] := Kjm*(round(E0) - (n + 1 - 1))
λ[n + 1] = 0.00595933
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# 6. Средняя наработка до обнаружения следующей n+1 ошибки
m[i] := 1/λ[i]
m[n + 1] := 1/λ[n + 1]
m[n + 1] = 167.804
# 7. Вероятность безотказной работы, т.е. отсутсвия следующего n+1 отказа
P[i] := e^(-Kjm*(E0 - i + 1)*t[i])
P[n + 1] := e^(-Kjm*(E0 - n)*t[n + 1])
P[n + 1] = 0.626673
